# Реализация в виде полинома Лагранжа
# /* Исходные данные */ | /* Требуется вычислить */
X := [5; 10; 15]
Y := [51; 53; 54]
c := 13
# /* Ход работы */
f(a, x, y, z) := Y[x]*((a - X[y])*(a - X[z]))/((X[x] - X[y])*(X[x] - X[z])) + Y[y]*((a - X[x])*(a - X[z]))/((X[y] - X[x])*(X[y] - X[z])) + Y[z]*((a - X[x])*(a - X[y]))/((X[z] - X[x])*(X[z] - X[y]))
f(c, 0, 1, 2) = 53.72
