# Реализация в виде полинома Ньютона
# /* Исходные данные */ | /* Требуется вычислить */
X := [5; 10; 15]
Y := [51; 53; 54]
c := 13
# /* Ход работы */
R1(i, j) := (Y[j] - Y[i])/(X[j] - X[i])
R2(i, j, t) := (R1(i, j) - R1(i, t))/(X[j] - X[t])
f(a, x, y, z) := Y[x] + (a - X[x])*R1(x, y) + (a - X[x])*(a - X[y])*R2(x, y, z)
f(c, 0, 1, 2) = 53.72
