# Реализация в виде Сплайн-интерполяции
# /* Исходные данные */ | /* Требуется вычислить */
X := [5; 10; 15]
Y := [51; 53; 54]
c := 13
# /* Ход работы */
i := 0 .. 1
h[i] := X[i + 1] - X[i] = [5; 5]
M := [
    h[0], 0, 0, h[0]^3, 0;
    0, h[1], h[1]^2, 0, h[1]^3;
    -1, 1, 0, -3*h[0]^2, 0;
    0, 0, 1, -3*h[0], 0;
    0, 0, 1, 0, 3*h[0]
]
W := [Y[1] - Y[0]; Y[2] - Y[1]; 0; 0; 0]
Z := M^-1*W = [0.45; 0.3; -0.03; -0.002; 0.002]
B := [Z[0]; Z[1]] = [0.45; 0.3]
C := [0; Z[2]] = [0; -0.03]
D := [Z[3]; Z[4]] = [-0.002; 0.002]
S := Y[0] + B[0]*(c - X[0]) + C[0]*(c - X[0])^2 + D[0]*(c - X[0])^3 = 53.576
cspline(X, Y) = [0; 3; 2; -0.08; -0.04; 0]
interp(cspline(X, Y), X, Y, c) = 53.656
