f(x) := exp(x)*sin(x)
a := 0
b := π/2
n := 1000
rectangle_method_1(a, b, n, f) :=
    h ← (b - a)/n
    S ← 0
    for i ∈ 0 .. (n - 1)
        x[i] ← a + h*i
        S ← S + f(x[i])
    S ← S*h
    S
rectangle_method_2(a, b, n, f) :=
    h ← (b - a)/n
    h*sum(f(a + i*h), i = 1 .. n)
rectangle_method_3(a, b, n, f) := (b - a)/n*sum(f(a + i*(b - a)/n - (b - a)/(2*n)), i = 1 .. n)
rectangle_method_1(a, b, n, f) = 2.90146
rectangle_method_2(a, b, n, f) = 2.90902
rectangle_method_3(a, b, n, f) = 2.90524
trapezoid_method(a, b, n, f) :=
    h ← (b - a)/n
    h*((f(a) + f(b))/2 + sum(f(a + i*h), i = 1 .. n - 1))
trapezoid_method(a, b, n, f) = 2.90524
simpson_method(a, b, n, f) :=
    h ← (b - a)/n
    h/3*(f(a) + f(b) + 4*sum(f(a + (2*i - 1)*h), i = 1 .. n/2) + 2*sum(f(a + 2*i*h), i = 1 .. n/2 - 1))
simpson_method(a, b, n, f) = 2.90524
x := 0, 0.1 .. π/2
# [plot: f(x) vs x]
N := 10000
i := 1 .. N
x[i] := rnd(b + a) - a
y[i] := rnd(f(a + f(b))) - f(a)
m[i] :=
    if y[i] < f(x[i])
        1
    else
        0
M := sum(m) = 10000
S := M*a*b/N
S = 0
