# Реализация в виде канонического полинома
# /* Исходные данные */ | /* Требуется вычислить */
X := [5; 10; 15]
Y := [51; 53; 54]
c := 13
# /* Ход работы */
A := [1, X[0], X[0]^2; 1, X[1], X[1]^2; 1, X[2], X[2]^2]
T := A^-1*Y = [48; 0.7; -0.02]
f(x) := T[0] + T[1]*x + T[2]*x^2
f(c) = 53.72
