x := [1; 2; 3; 4; 5]
y := [1.1; 1.55; 1.9; 2.25; 2.5]
n := length(x) = 5
# /* Линейная аппроксимация */
[b; k] := [n, sum(x); sum(x), sum(x[i]^2, i = 0 .. n - 1)]^-1*[sum(y); sum(x[i]*y[i], i = 0 .. n - 1)] = [0.81; 0.35]
yLinear(x) := b + k*x
yLinear(x) = [1.16; 1.51; 1.86; 2.21; 2.56]
# [plot: yLinear(x) vs x]
sum((y[i] - yLinear(x[i]))^2, i = 0 .. n - 1) = 0.012
# /* Аппроксимация степенной функцией */
k := exp(intercept(vectorize(ln(x)), vectorize(ln(y)))) = 1.09357
m := slope(vectorize(ln(x)), vectorize(ln(y))) = 0.51288
yPower(x) := k*x^m
yPower(x) = [1.09357; 1.56041; 1.92111; 2.22654; 2.49651]
# [plot: yPower(x) vs x]
sum((y - yPower(x))^2) = 0.00115781
# /* Аппроксимация показательной функцией */
k := exp(intercept(x, vectorize(ln(y)))) = 0.97642
m := slope(x, vectorize(ln(y))) = 0.201464
yExp(x) := k*exp(m*x)
yExp(x) = [1.19435; 1.46092; 1.78698; 2.18582; 2.67368]
# [plot: yExp(x) vs x]
sum((y - yExp(x))^2) = 0.0638937
# /* Аппроксимация логарифмической функцией */
k := slope(vectorize(ln(x)), y) = 0.866465
m := intercept(vectorize(ln(x)), y) = 1.03036
yLog(x) := k*ln(x) + m
yLog(x) = [1.03036; 1.63095; 1.98227; 2.23154; 2.42488]
# [plot: yLog(x) vs x]
sum((y - yLog(x))^2) = 0.0241542
# /* Аппроксимация гиперболической функцией */
k := slope(1/x, y) = -1.60652
m := intercept(1/x, y) = 2.59364
yH(x) :=
    if x == 0
        0
    else
        k/x + m
# [plot: yH(x) vs x]
sum((y - yH(x))^2) = 0.150724
# /* Аппроксимация квадратической функцией */
A := [
    n, sum(x), sum(x[i]^2, i = 0 .. n - 1);
    sum(x), sum(x[i]^2, i = 0 .. n - 1), sum(x[i]^3, i = 0 .. n - 1);
    sum(x[i]^2, i = 0 .. n - 1), sum(x[i]^3, i = 0 .. n - 1), sum(x[i]^4, i = 0 .. n - 1)
]^-1*[sum(y[i], i = 0 .. n - 1); sum(y[i]*x[i], i = 0 .. n - 1); sum(y[i]*x[i]^2, i = 0 .. n - 1)] = [0.61; 0.521429; -0.0285714]
ySq(x) := A[0] + A[1]*x + A[2]*x^2
# [plot: ySq(x) vs x]
sum((y - ySq(x))^2) = 0.000571429
